# Исходные данные:
f(x) := sin(x + π/2)*x^3 + x^2
n := 15
a := -5
b := 5
Δa := 0
Δb := 0
x := a, a + 0.001 .. b
k := 0 .. n - 1
m := 0 .. n - 1
Δx := (b - a - Δb - Δa)/(n - 1)
x1[k] := a + Δa + Δx*k
x2[k] := (a + b)/2 + (b - a)/2*cos(π*(2*k + 1)/(2*n))
f1[k] := f(x1[k])
f2[k] := f(x2[k])
M1[m, k] := x1[m]^k
|M1| = 3.13416e49
# - Не особенные
M2[m, k] := x2[m]^k
|M2| = -5.14749e52
a1 := M1^-1*f1
a2 := M2^-1*f2
L1(x) := sum(a1[k]*x^k, k = 0 .. n - 1)
L2(x) := sum(a2[k]*x^k, k = 0 .. n - 1)
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# Рассчет погрешности:
Ω1(x) := product(x - x1[k], k = 0 .. n - 1)
Ω2(x) := product(x - x2[k], k = 0 .. n - 1)
R1(x) := |L1(x) - f(x)|
R2(x) := |L2(x) - f(x)|
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# n | R1 | R2 | R2/R1 | Ω1 | Ω2 | Ω1/Ω2
# 5 | 47.109 | 27.87 | 0.592 | 354.632 | 195.313 | 0.551
# 10 | 6.03 | 0.815 | 0.135 | 1.88*10^4 | 1.907*10^4 | 1.014
# 15 | 0.072 | 2.29*10^-3 | 0.032 | 5.882*10^7 | 1.863*10^6 | 0.032
# 20 | 1.744*10^-5 | 1.189*10^-7 | 6.818*10^-3 | 2.138*10^9 | 1.819*10^8 | 0.085
# 25 | 4.409*10^-5 | 1.014*10^-6 | 0.023 | 1.738*10^13 | 1.776*10^10 | 1.022*10^-3
# 30 | 5.592*10^-3 | 1.014*10^-4 | 0.018 | 4.541*10^14 | 1.735*10^10 | 3.821*10^-5
# 40 | 186.694 | 0.437 | 2.341*10^-3 | 1.22*10^20 | 1.654*10^16 | 1.356*10^-4
# Полиномы Чебышева:
T1(m, x) := if(m == 0, 1, if(m == 1, x, 2*x*T1(m - 1, x) - T1(m - 2, x)))
T2(m, x) := 1/2*((x + sqrt(x^2 - 1))^m + (x - sqrt(x^2 - 1))^m)
T3(m, x) := cos(m*acos(x))
T1(1, t) → t
T1(2, t) → 2*t^2 - 1
T1(3, t) → 2*t*(2*t^2 - 1) - t
T1(4, t) → 1 - 2*t*(t - 2*t*(2*t^2 - 1)) - 2*t^2
T1(5, t) → t - 2*t*(2*t^2 - 1) - 2*t*(2*t^2 + 2*t*(t - 2*t*(2*t^2 - 1)) - 1)
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# Для производной:
df(x) := d/dx(f(x))
dL1(x) := sum(a1[k]*k*x^(k - 1), k = 0 .. n - 1)
dL2(x) := sum(a2[k]*k*x^(k - 1), k = 0 .. n - 1)
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# Погрешности:
dR1 := 0.951
IR2 := 0.089
# Для первообразной:
λ := 5
If(x) := integral(f(x), x = λ .. x)
IL1(x) := sum(a1[k]*(x^(k + 1) - λ^(k + 1))/(k + 1), k = 0 .. n - 1)
IL2(x) := sum(a2[k]*(x^(k + 1) - λ^(k + 1))/(k + 1), k = 0 .. n - 1)
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# Погрешности:
IR1 := 0.028
IR2 := 8.13*10^-4
